# OpenSim document version 40600
AnalyzeTool:
  model_file: /content/Muscle_Project_Assignment/locked_gait10dof18musc_updated.osim
  replace_force_set: false
  results_directory: /content/results
  output_precision: 8
  initial_time: 0
  final_time: 1
  solve_for_equilibrium_for_auxiliary_states: false
  maximum_number_of_integrator_steps: 20000
  maximum_integrator_step_size: 1
  minimum_integrator_step_size: 1e-8
  integrator_error_tolerance: 1e-5
  coordinates_file: /content/Muscle_Project_Assignment/Highknee.mot
  lowpass_cutoff_frequency_for_coordinates: -1
  AnalysisSet Analyses:
    StaticOptimization: start_time=-Inf end_time=Inf step_interval=10 in_degrees=true use_model_force_set=true
        activation_exponent=2 use_muscle_physiology=false optimizer_convergence_criterion=0.0001
        optimizer_max_iterations=1000
